# CAPACITANCE OF TWO PARALLEL PLATES | file:  capac.mcd
# Formulas included in this spreadsheet:
# Capacitance of two plates  CPLATE()
# Impedance magnitude of capacitor at
# one frequency  XCF()
# Impedance magnitude of capacitor as
# seen by rising edge  XCR()
# Variables used:
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# w  Width of plate overlap  (in.)
#
# x  Length of plate overlap  (in.)
#
# h  Height of one plate
# above the other (in.)
#
# er  Relative dielectric
# constant of material
# between plates
# Capacitance of two plates (F):
CPLATE(w, x, h, er) := 2.249*10^-13*er*x*w/h
# A power and ground plane separated by 0.010 in.
# of FR-4 dielectric (er = 4.5) share a capacitance of
# 100 pF/in.^2
# Halving the separation doubles the capacitance.
# Impedance magnitude of capacitor at frequency f (Ω):
# c  Capacitance (F)
#
# f  Frequency (Hz)
XCF(c, f) := 1/(2*π*f*c)
# The impedance, at 100 MHz, of a
# 100-pF capacitor is 16 Ω.
XCF(100*10^-12, 10^8) = 15.9155
# Impedance magnitude of capacitor as seen by rising edge  (Ω):
# c  Capacitance (F)
#
# tr  10-90% rise time (s)
XCR(c, tr) := tr/(π*c)
# The impedance, as seen by a 5-ns rising edge
# of a 100-pF capacitor is 16 Ω.
XCR(100*10^-12, 5*10^-9) = 15.9155
