# INDUCTANCE OF CIRCULAR LOOP | file:  circular.mcd
# Formulas included in this spreadsheet:
# Inductance of circular wire loop  LCIRC()
# Impedance magnitude of inductor at
# one frequency  XLF()
# Impedance magnitude of inductor as
# seen by rising edge  XLR()
# Variables used:
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# d  Diameter of wire (in.)
#
# x  Diameter of wire loop (in.)
# Inductance of wire loop (H):
LCIRC(d, x) := 1.56*10^-8*x*(ln(8*x/d) - 2)
# A loop of 24-gauge wire the size of the
# loop between your thumb and forefinger has
# about 100 nH of inductance.
LCIRC(.01, 1.3) = 1.00325e-7
# Changing the wire diameter from AWG 24
# to AWG 14 makes little difference.  The log
# function is rather insensitive to wire size.
LCIRC(.1, 1.3) = 5.36282e-8
# Impedance magnitude of inductor at frequency f (Ω):
# l  Inductance (H)
#
# f  Frequency (Hz)
XLF(l, f) := 2*π*f*l
# The impedance, at 100 MHz, of a
# 100-nH inductor is 62 Ω.
XLF(100*10^-9, 10^8) = 62.8319
# Impedance magnitude of inductor as seen by rising edge (Ω):
# l  Inductance (H)
#
# tr  10-90% rise time (s)
XLT(l, tr) := π*l/tr
# The impedance, as seen by a 5-ns rising edge,
# of a 100-nH inductor is 62 Ω.
XLT(100*10^-9, 5*10^-9) = 62.8319
