# COAXIAL TRANSMISSION LINE | file:  coax.mcd
# Formulas included in this spreadsheet:
# Coaxial cable characteristic impedance  ZCOAX()
# Coaxial cable propagation delay  PCOAX()
# Coaxial cable inductance  LCOAX()
# Coaxial cable capacitance  CCOAX()
# Variables used:
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# d1  Diameter of inner wire (in)
#
# d2  Diameter of outer shield (in)
# x  Length of cable (in)
#
# er  Relative dielectric
# constant of material
# surrounding the inner
# wire
# Characteristic impedance of coaxial cable (Ω):
ZCOAX(d1, d2, er) := 60/sqrt(er)*ln(d2/d1)
# Propagation delay per in. for coaxial cable (s/in.):
PCOAX(er) := 84.72*10^-12*sqrt(er)
# Inductance of coaxial cable (H):
LCOAX(d1, d2, x) := x*5.08*10^-9*ln(d2/d1)
# Capacitance of coaxial cable (F):
CCOAX(d1, d2, er, x) := (x*1.41*10^-12/ln(d2/d1))*er
# ___________________________________________________________________
# Example coaxial cable calculations
# Diameter of AWG 30 inner wire (in.)
D1 := .01
# Inside diameter of shield (in.)
D2 := .1
# Length of cable (in.)
X := 20.000
# Relative dielectric constant
er := 2.2
# Characteristic impedance (Ω):
ZCOAX(D1, D2, er) = 93.1442
# Total inductance (H):
LCOAX(D1, D2, X) = 2.33943e-7
# Same result in nH:
LCOAX(D1, D2, X)*10^9 = 233.943
# Inductance per in. (H):
LCOAX(D1, D2, 1) = 1.16971e-8
# Total capacitance (F):
CCOAX(D1, D2, er, X) = 2.69436e-11
# Same result in pF:
CCOAX(D1, D2, er, X)*10^12 = 26.9436
# Capacitance per in. (F):
CCOAX(D1, D2, er, 1) = 1.34718e-12
