# PHYSICAL CONSTANTS USED IN TRANSMISSION LINE WORK  file: constant.mcd
# Electric permittivity
# of free space (metric)
E0_meters := 8.854*10^-12  # F/m
# Recalculate in in.
E0_inches := E0_meters*.0254
E0_inches = 2.24892e-13
# Display calculated value
# Magnetic permeability
# of free space (metric)
U0_meters := 4*π*10^-7  # H/m
# Recalculate in in.
U0_inches := U0_meters*.0254
U0_inches = 3.19186e-8
# Display calculated value
# We often need
# this number
U0_inches/(2*π) = 5.08e-9
# Speed of light
# (metric)
C_meters := 2.998*10^8  # m/s
C_inches := C_meters/.0254
# Recalculated in in.
C_inches = 1.18031e10
# Display calculated value
10^12/C_inches = 84.7231
# Propagation delay
# at light speed (ps/in.)
