# GENERAL RELATIONS AMONG TRANSMISSION LINE PARAMETERS file: general.mcd
# Conversion formulas included in this spreadsheet:
# Inductance and capacitance to impedance
# Inductance and capacitance to propagation delay
# Effective permittivity to propagation delay
# Impedance and propagation delay to capacitance
# Impedance and propagation delay to inductance
# Z0()
# PDLY1()
# PDLY2()
# CPI()
# LPI()
# Variables used:
# lpi  Inductance per inch (H)
# cpi  Capacitance per inch (F)
# pdly  Propagation delay (s/in.)
# z0  Line impedance (Ω)
# eeff  Effective relative permittivity
# Given inductance per inch and capacitance per inch,
# find the characteristic impedance in ohms:
Z0(lpi, cpi) := sqrt(lpi/cpi)
# Given inductance per inch and capacitance per inch,
# find the propagation delay per inch:
PDLY1(lpi, cpi) := sqrt(lpi*cpi)
# Given the effective electric permittivity of the surrounding medium,
# find the propagation delay per inch:
PDLY2(eeff) := 84.72*10^-12*sqrt(eeff)
# Given impedance and propagation delay, find the capacitance per inch:
CPI(zo, pdly) := pdly/zo
# Given impedance and propagation delay, find the inductance per inch:
LPI(zo, pdly) := zo*pdly
