# TRANSMISSION LINE MADE FROM ROUND WIRE (WIRE-WRAP) | file:  round.mcd
# Formulas included in this spreadsheet:
# Round wire characteristic impedance  ZROUND()
# Round wire propagation delay  PROUND()
# Round wire inductance  LROUND()
# Round wire capacitance  CROUND()
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# Variables used:
# d  Diameter of wire (in.)
#
# h  Height of wire above
# ground (in.)
#
# x  Length of wire (in.)
#
# (We assume the wire is
# suspended in air, for which
# the relative dielectric
# constant is 1.00.)
# Characteristic impedance of round
# wire above ground plane (Ω):
ZROUND(d, h) := 60*ln(4*h/d)
# Propagation delay per in. of round
# wire above ground plane (s/in):
PROUND(d, h) := 84.72*10^-12  # (assume air dielectric)
# Inductance of round wire
# above ground plane (H):
LROUND(d, h, x) := x*5.08*10^-9*ln(4*h/d)
# Capacitance of round wire
# above ground plane (F):
CROUND(d, h, x) := (x*1.413*10^-12/ln(4*h/d))
# ___________________________________________________________________
# Example round wire calculations
# Diameter of AWG 30 wire (in.)
D := .01
# Length of wire (in.)
X := 2.000
# Height above ground (in.)
H := .100
# Characteristic impedance (Ω):
ZROUND(D, H) = 221.333
# Total inductance (H):
LROUND(D, H, X) = 3.7479e-8
# Same result in nH:
LROUND(D, H, X)*10^9 = 37.479
# Inductance per in. (H):
LROUND(D, H, 1) = 1.87395e-8
# Total capacitance (F):
CROUND(D, H, X) = 7.66086e-13
# Same result in units pF:
CROUND(D, H, X)*10^12 = 0.766086
# Capacitance per in. (F):
CROUND(D, H, 1) = 3.83043e-13
