# TRANSMISSION LINE MADE FROM TWISTED PAIR WIRE | file:  twist.mcd
# Formulas included in this spreadsheet:
# Twisted-pair characteristic impedance  ZTWIST()
# Twisted-pair propagation delay  PTWIST()
# Twisted-pair inductance  LTWIST()
# Twisted-pair capacitance  CTWIST()
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# Variables used:
# d  Diameter of wire (in.)
#
# s  Separation between
# wires (in.)
# x  Length of wire (in.)
#
# er  Effective relative
# dielectric constant of
# medium between wires
# Characteristic impedance of twisted pair (Ω):
ZTWIST(d, s, er) := 120/sqrt(er)*ln(2*s/d)
# Propagation delay per in. twisted pair (s/in.):
PTWIST(er) := 84.72*10^-12*sqrt(er)
# Inductance of twisted pair (H):
LTWIST(d, s, x) := x*10.16*10^-9*ln(2*s/d)
# Capacitance of twisted pair (F):
CTWIST(d, s, er, x) := (x*.7065*10^-12/ln(2*s/d))*er
# ___________________________________________________________________
# Example twisted-pair calculations
# Diameter of AWG 24 wire (in.)
D := .02
# Length of wire (in.)
X := 2.000
# Separation between wire
# centers (in.)
S := .038
# Relative dielectric constant
er := 2.5
# Characteristic impedance (Ω):
ZTWIST(D, S, er) = 101.319
# Total inductance (H):
LTWIST(D, S, X) = 2.71272e-8
# Same result in nH:
LTWIST(D, S, X)*10^9 = 27.1272
# Inductance per in. (H):
LTWIST(D, S, 1) = 1.35636e-8
# Total capacitance (F):
CTWIST(D, S, er, X) = 2.64607e-12
# Same result in pF:
CTWIST(D, S, er, X)*10^12 = 2.64607
# Capacitance per in. (F):
CTWIST(D, S, er, 1) = 1.32303e-12
